sizeMatrix := 100
formation(sizeMatrix) :=
    a ← 1
    b ← 10
    for i ∈ 0 .. sizeMatrix
        for j ∈ 0 .. sizeMatrix
            Matrix1[i, j] ← round(a + rnd(b - a)) if i ≤ j
            Matrix1[i, j] ← 0 otherwise
    for i ∈ 0 .. sizeMatrix
        for j ∈ 0 .. sizeMatrix
            Matrix2[i, j] ← 0 if i < j
            Matrix2[i, j] ← round(a + rnd(b - a)) otherwise
    result ← Matrix1*Matrix2
    return result
timeCosts(sizeMatrix) :=
    for i ∈ 1 .. sizeMatrix
        t1 ← time(1)
        formation(i - 1)
        t2 ← time(2)
        res[i, 0] ← i
        res[i, 1] ← t2 - t1
        i ← i + 1
    res
formation(sizeMatrix) =  # no stored result
tres := timeCosts(sizeMatrix) = [
    0, 0;
    1, 0;
    2, 0;
    3, 0;
    4, 0;
    5, 0;
    6, 0;
    7, 0;
    8, 0;
    9, 0
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]
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