formation(size) :=
    a ← 1
    b ← 10
    for i ∈ 0 .. size
        for j ∈ 0 .. size
            matrix1[i, j] ← round(a + rnd(b - a)) if i ≤ j
            matrix1[i, j] ← 0 otherwise
    for i ∈ 0 .. size
        for j ∈ 0 .. size
            matrix2[i, j] ← 0 if i < j
            matrix2[i, j] ← round(a + rnd(b - a)) otherwise
    return matrix1*matrix2
t(size) :=
    for i ∈ 1 .. size
        t1 ← time(1)
        formation(i - 1)
        t2 ← time(2)
        res[i, 0] ← i
        res[i, 1] ← t2 - t1
        i ← i + 1
    return res
test1 := t(100)
test2 := t(200)
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